(1)
a := 2
b := 3
y := (sqrt(a) - sqrt(b))*(nthroot(a, 3) - nthroot(b, 3))
y = 0.0579508
(2)
y(x) := sqrt(log(x)) - sqrt(ln(x))
x := 1.13 .. 2.43
x = [1.13; 2.13]
y(x) = [-0.119209; -0.296509]
(3)
Сравнить
2^(3^(4^(5 - sqrt(5))))  # и
3^(2^(5^(4 - sqrt(2))))
log(2)*3^(4^(5 - sqrt(5))) > log(3)*2^(5^(4 - sqrt(2))) = 1
# 1 | число | больше | 2
(4)
y(x) := 1/ln(x) + 1/(1 - x)
x := 0.01 .. 2.01
# [plot: x vs y(x)]
y(x)
(5)
# [plot: y(x) vs x]
y(x) := 7*x^5 + 2*x^3 + 3*x - 900
x := 2.2
root(y(x), x) = 2.61525
y(x) := x - 200 - ln(x)
# [plot: y(x) vs x]
x := 2.25
root(y(x), x) = 205.325
x == 200 + ln(x) solve → 205.324592103
